// COMSOL Multiphysics 5.6.0.401 model "ComsolGrupp13D.mph"
// Outline of the model tree

Parameters
  alpha = 100

Probes
  pdom1: DomainPoint "Domain Point Probe 1" | coords = {3, 1}
    ppb1: PointExpr "Point Probe Expression 1" | expr = u; unit = 1; descr = Dependent variable u; table = tbl1
  bnd1: Boundary "Boundary Probe 1" on boundaries 4 | expr = u; unit = 1; descr = Dependent variable u; table = tbl1

Geometry
  geom1 "Geometry 1" (2D, length unit m)
    r1: Rectangle | size = {5, 2}
    c1: Circle | pos = {2.75, 0.75}; r = 0.2
    c2: Circle | pos = {2.75, 1.25}; r = 0.2
    c3: Circle | pos = {3.25, 1.25}; r = 0.2
    c4: Circle | pos = {3.25, 0.75}; r = 0.2
    dif1: Difference | input = r1; input2 = c1, c2, c3, c4
    fin: Finalize "Form Union"

Physics
  poeq: PoissonEquation "Poisson's Equation" on all domains
    dependent variable u
    peq1: PoissonEquation "Poisson's Equation 1" (default) | f = 6000*exp(-5*(x-1)^2-10*(y-1.5)^2)
    zflx1: ZeroFluxBoundary "Zero Flux 1" (default)
    init1: init "Initial Values 1" (default)
    dir1: DirichletBoundary "Dirichlet Boundary Condition 1" on boundaries 1 | r = 40
    zflx2: ZeroFluxBoundary "Zero Flux 2" on boundaries 4
    flux1: FluxBoundary "Flux/Source 1" on boundaries 5-20 | g = 20; q = 1

Mesh
  mesh1 "Mesh 1" (physics-controlled)
    size: MeshSizeDefault | hauto = 1

Studies
  std1 "Study 1"
    stat: Stationary

Solver configurations
  sol1 "Solution 1" (study std1)
    v1: Variables "Dependent Variables 1"
    s1: Stationary "Stationary Solver 1"
      dDef: Direct
      fc1: FullyCoupled | linsolver = dDef

Datasets
  dset1: Solution | solution = sol1
  dset2: Solution "Probe Solution 2" | solution = sol1
  cpt1: CutPoint2D "Domain Point Probe 1" | data = dset2; pointx = 3; pointy = 1
  dset3: Solution "Probe Solution 3" | solution = sol1
  avh1: Average "Boundary Probe 1" on boundaries 4 | data = dset3

Derived values
  pev1: EvalPoint "Point Probe Expression 1" | data = cpt1; table = tbl1; expr = u
  pev2: EvalPoint "Boundary Probe 1" | data = avh1; table = tbl1; expr = u

Tables
  tbl1: Table "Probe Table 1"
    Dependent variable u (1), Point: (3, 1) | Dependent variable u (1), Boundary Probe 1
    111.59 | 147.891

Plots
  pg1: PlotGroup2D "2D Plot Group 1" | data = dset1
    surf1: Surface | expr = u
  pg2: PlotGroup1D "Probe Plot Group 2"
    tblp1: Table "Probe Table Graph 1" | table = tbl1